# OpenSim document version 40000
ScaleTool scaled_subject_05:
  mass: 4 [kg]
  height: 1803.4
  age: 99
  notes: This is an example setup file for scale.exe.
  GenericModelMaker:
    model_file: WristModel_Marker_AllMuscles.osim
    marker_set_file: markerfile.xml
  ModelScaler:
    apply: true
    scaling_order: measurements manualScale
    marker_file: statics_05.trc
    time_range: 0 4.79333
    preserve_mass_distribution: true
    output_model_file: subject01_scaledOnly.osim
    output_scale_file: subject01_scaleSet_applied.xml
    MeasurementSet changed MeasurementSetName:
      Measurement Proximalphalanx1: apply=true
        MarkerPair: markers=(MP1 IP)
        BodyScale Proximalphalanx1: axes=(X Y Z)
      Measurement Proximalphalanx2: apply=true
        MarkerPair: markers=(MP2 PP2)
        BodyScale Proximalphalanx2: axes=(X Y Z)
      Measurement Proximalphalanx3: apply=true
        MarkerPair: markers=(MP3 PP3)
        BodyScale Proximalphalanx3: axes=(X Y Z)
      Measurement Proximalphalanx4: apply=true
        MarkerPair: markers=(MP4 PP4)
        BodyScale Proximalphalanx4: axes=(X Y Z)
      Measurement Proximalphalanx5: apply=true
        MarkerPair: markers=(MP5 PP5)
        BodyScale Proximalphalanx5: axes=(X Y Z)
      Measurement Medialphalanx2: apply=true
        MarkerPair: markers=(PP2 DP2)
        BodyScale Medialphalanx2: axes=(X Y Z)
      Measurement Medialphalanx3: apply=true
        MarkerPair: markers=(PP3 DP3)
        BodyScale Medialphalanx3: axes=(X Y Z)
      Measurement Medialphalanx4: apply=true
        MarkerPair: markers=(PP4 DP4)
        BodyScale Medialphalanx4: axes=(X Y Z)
      Measurement Medialphalanx5: apply=true
        MarkerPair: markers=(PP5 DP5)
        BodyScale Medialphalanx5: axes=(X Y Z)
      Measurement Distalphalanx1: apply=true
        MarkerPair: markers=(IP FT1)
        BodyScale Distalphalanx1: axes=(X Y Z)
      Measurement Distalphalanx2: apply=true
        MarkerPair: markers=(DP2 FT2)
        BodyScale Distalphalanx2: axes=(X Y Z)
      Measurement Distalphalanx3: apply=true
        MarkerPair: markers=(DP3 FT3)
        BodyScale Distalphalanx3: axes=(X Y Z)
      Measurement Distalphalanx4: apply=true
        MarkerPair: markers=(DP4 FT4)
        BodyScale Distalphalanx4: axes=(X Y Z)
      Measurement Distalphalanx5: apply=true
        MarkerPair: markers=(DP5 FT5)
        BodyScale Distalphalanx5: axes=(X Y Z)
      Measurement metacarpal2_length: apply=true
        MarkerPair: markers=(CMC2 PP2)
        BodyScale metacarpal2: axes=(X Y Z)
      Measurement metacarpal5_length: apply=true
        MarkerPair: markers=(CMC5 PP5)
        BodyScale metacarpal5: axes=(X Y Z)
      Measurement metacarpal4_length: apply=true
        MarkerPair: markers=(CMC5 PP5)
        BodyScale metacarpal4: axes=(X Y Z)
      Measurement metacarpal3_length: apply=true
        MarkerPair: markers=(CMC2 PP2)
        BodyScale metacarpal3: axes=(X Y Z)
      Measurement metacarpal1: apply=true
        MarkerPair: markers=(CMC1 MP1)
        BodyScale metacarpal1: axes=(X Y Z)
      Measurement ulna: apply=true
        MarkerPair: markers=(EM US)
        BodyScale ulna: axes=(X Y Z)
      Measurement radius: apply=true
        MarkerPair: markers=(EL RS)
        BodyScale radius: axes=(X Y Z)
    ScaleSet changed ScaleSet:
      Scale: scales=(0.9 0.9 0.9) segment=auxprfem apply=true
      Scale: scales=(0.9 0.9 0.9) segment=auxprrud apply=true
  MarkerPlacer:
    apply: true
    marker_file: statics_05.trc
    time_range: 0 4.79333
    output_motion_file: subject01_static_output.mot
    output_model_file: scaled_subject05.osim
    max_marker_movement: -1
    IKTaskSet:
      IKMarkerTask EM: apply=true weight=1
      IKMarkerTask EL: apply=true weight=1
      IKMarkerTask RS: apply=true weight=1
      IKMarkerTask US: apply=true weight=1
      IKMarkerTask CMC1: apply=true weight=1
      IKMarkerTask CMC2: apply=true weight=1
      IKMarkerTask CMC5: apply=true weight=1
      IKMarkerTask MP1: apply=true weight=1
      IKMarkerTask MP2: apply=true weight=1
      IKMarkerTask MP3: apply=true weight=1
      IKMarkerTask MP4: apply=true weight=1
      IKMarkerTask MP5: apply=true weight=1
      IKMarkerTask IP: apply=true weight=1
      IKMarkerTask PP2: apply=true weight=1
      IKMarkerTask PP3: apply=true weight=1
      IKMarkerTask PP4: apply=true weight=1
      IKMarkerTask PP5: apply=true weight=1
      IKMarkerTask DP2: apply=true weight=1
      IKMarkerTask DP3: apply=true weight=1
      IKMarkerTask DP4: apply=true weight=1
      IKMarkerTask DP5: apply=true weight=1
      IKMarkerTask FT1: apply=true weight=1
      IKMarkerTask FT2: apply=true weight=1
      IKMarkerTask FT3: apply=true weight=1
      IKMarkerTask FT4: apply=true weight=1
      IKMarkerTask FT5: apply=true weight=1
      IKMarkerTask PIP2: apply=true weight=1
      IKCoordinateTask [values shared by the 8 below unless stated]: apply=true weight=1 value_type=default_value
          value=0
      IKCoordinateTask PIP2
      IKCoordinateTask DIP2
      IKCoordinateTask PIP3
      IKCoordinateTask DIP3
      IKCoordinateTask PIP4
      IKCoordinateTask DIP4
      IKCoordinateTask PIP5
      IKCoordinateTask DIP5
