# OpenSim document version 40000
MarkerSet:
  Marker CMC1: metacarpal1 (-0.000769447 0.0043449 0.0233998) fixed=true
  Marker CMC2: metacarpal2 (-0.0171852 -0.0163273 0.0295545) fixed=true
  Marker CMC5: metacarpal5 (-0.0123096 -0.0206636 -0.0305483) fixed=true
  Marker MP1: metacarpal1 (0.00553266 -0.0310789 0.055322) fixed=true
  Marker MP2: metacarpal2 (-0.0105963 -0.0777904 0.0458314) fixed=true
  Marker MP3: metacarpal3 (-0.0123438 -0.0841903 0.0147253) fixed=true
  Marker MP4: metacarpal4 (-0.00821118 -0.0838102 -0.00917913) fixed=true
  Marker MP5: metacarpal5 (-0.007635 -0.072027 -0.0379326) fixed=true
  Marker IP: Proximalphalanx1 (0.0126819 -0.0608548 0.0694094) fixed=true
  Marker PP2: Proximalphalanx2 (-0.005175 -0.058126 0.00869704) fixed=true
  Marker PP3: Proximalphalanx3 (-0.00961824 -0.139196 0.0207504) fixed=true
  Marker PP4: Proximalphalanx4 (-0.00556189 -0.138111 -0.00373965) fixed=true
  Marker PP5: Proximalphalanx5 (-0.00515283 -0.111061 -0.0353297) fixed=true
  Marker DP2: Medialphalanx2 (-0.00298737 -0.0394561 0.00376869) fixed=true
  Marker DP3: Medialphalanx3 (-0.00892091 -0.172206 0.0234315) fixed=true
  Marker DP4: Medialphalanx4 (-0.00213524 -0.169702 -0.000918559) fixed=true
  Marker DP5: Medialphalanx5 (-0.00321466 -0.136132 -0.0302772) fixed=true
  Marker FT1: Distalphalanx1 (0.0106472 -0.0906538 0.0792393) fixed=true
  Marker FT2: Distalphalanx2 (-0.00495079 -0.0247732 0.00134107) fixed=true
  Marker FT3: Distalphalanx3 (-0.0101647 -0.187983 0.0272654) fixed=true
  Marker FT4: Distalphalanx4 (-0.00116731 -0.186122 0.000404973) fixed=true
  Marker FT5: Distalphalanx5 (-0.00124371 -0.154295 -0.028567) fixed=true
  Marker EM: ulna (-0.0119775 -0.0224608 -0.0194275) fixed=true
  Marker EL: radius (-0.0208062 -0.00139596 0.00347157) fixed=true
  Marker US: ulna (-0.0205133 -0.221015 0.0796279) fixed=true
  Marker RS: radius (0.000940134 -0.209164 0.082699) fixed=true
