# OpenSim document version 40000
Model:
  gravity: 0 -9.81 0
  credits: Gonzalez, R.V., Buchanan, T.S., Delp, S.L.
  length_units: meters
  force_units: N
  publications:
    How muscle architecture and moment arms affect wrist flexion-extension moments. Journal of Biomechanics, vol. 30, pp. 705-712, 1997.
  Ground: meshes=humerus.vtp
  BodySet:
    Body ulna: mass=1.1 [kg] mass_center=(0 -0.04 -0.03) inertia=(8.5 50 8.5 0 0 0) meshes=ulna.vtp
    Body radius: mass=0.2 mass_center=(0 -0.04 -0.03) inertia=(8.5 50 8.5 0 0 0) meshes=radius.vtp
      WrapCylinder Wrap_Wrist_FCU: xyz_body_rotation=(-0.2 0.42 0) translation=(-0.01 -0.23 0.055) quadrant=all
          radius=0.007 length=0.08
    Body rotaxis: mass=0.001 mass_center=(0 0 0) inertia=(0.05928 0.05928 0.05928 0 0 0)
    Body auxprfem: mass=0.001 mass_center=(0 0 0) inertia=(0.05928 0.05928 0.05928 0 0 0)
    Body auxprrud: mass=0.001 mass_center=(0 0 0) inertia=(0.05928 0.05928 0.05928 0 0 0)
    Body auxdrfem: mass=0.001 mass_center=(0 0 0) inertia=(0.05928 0.05928 0.05928 0 0 0)
    Body auxdrrud: mass=0.001 mass_center=(0 0 0) inertia=(0.05928 0.05928 0.05928 0 0 0)
    Body scaphoid: mass=0.005 mass_center=(0 0 0) inertia=(0.05928 0.05928 0.05928 0 0 0) meshes=r_scaph.vtp
    Body lunate: mass=0.004 mass_center=(0 0 0) inertia=(0.05928 0.05928 0.05928 0 0 0) meshes=r_lun.vtp
    Body trapezium: mass=0.004 mass_center=(0 0 0) inertia=(0.05928 0.05928 0.05928 0 0 0) meshes=r_trpzm.vtp
    Body trapezoid: mass=0.004 mass_center=(0 0 0) inertia=(0.05928 0.05928 0.05928 0 0 0) meshes=r_trpzd.vtp
    Body capitate: mass=0.006 mass_center=(0 0 0) inertia=(0.05928 0.05928 0.05928 0 0 0) meshes=r_cap.vtp
    Body pisiform: mass=0.002 mass_center=(0 0 0) inertia=(0.05928 0.05928 0.05928 0 0 0) meshes=r_pis.vtp
    Body triquetrum: mass=0.002 mass_center=(0 0 0) inertia=(0.05928 0.05928 0.05928 0 0 0) meshes=r_triq.vtp
    Body hamate: mass=0.06 mass_center=(0 0 0) inertia=(0.05928 0.05928 0.05928 0 0 0) meshes=r_ham.vtp
    Body carp_metacarp: mass=0.001 mass_center=(0 0 0) inertia=(0.05928 0.05928 0.05928 0 0 0)
    Body metacarpal2: mass=0.08 mass_center=(0 -0.029 0.03) inertia=(1.23126 3.67 1.23126 0 0 0) meshes=fingers1.vtp
    Body metacarpal3: mass=0.08 mass_center=(0 -0.04 0.012) inertia=(1.23126 3.67 1.23126 0 0 0) meshes=fingers8.vtp
    Body metacarpal4: mass=0.08 mass_center=(0 -0.04 -0.007) inertia=(1.23126 3.67 1.23126 0 0 0) meshes=fingers12.vtp
    Body metacarpal5: mass=0.08 mass_center=(0 -0.04 -0.03) inertia=(1.23126 3.67 1.23126 0 0 0) meshes=fingers16.vtp
    Body imagine: mass=0.001 mass_center=(0 0 0) inertia=(0.05928 0.05928 0.05928 0 0 0)
    Body humerus: mass=1.9 mass_center=(0 0 0) inertia=(8.5 50 8.5 0 0 0) meshes=humerus.vtp
    Body metacarpal1: mass=0.01855 mass_center=(0 -0.019 0.02) inertia=(1.23126 3.67 1.23126 0 0 0)
        meshes=fingers17.vtp
    Body Proximalphalanx1: mass=0.00875 mass_center=(0.005 -0.054 0.0475) inertia=(0.437 0.78372 0.437 0 0 0)
        meshes=fingers18.vtp
    Body Distalphalanx1: mass=0.01008 mass_center=(0.0125 -0.078 0.0587) inertia=(0.504 1.1166 0.504 0 0 0)
        meshes=fingers19.vtp
    Body Proximalphalanx2: mass=0.01331 mass_center=(0.00025 -0.02413 0.004) inertia=(0.63012 2.5389 0.63012 0 0 0)
        meshes=fingers2.vtp
    Body Medialphalanx2: mass=0.00674 mass_center=(0.001 -0.0164 0.0024) inertia=(0.2914 0.49156 0.2914 0 0 0)
        meshes=fingers3.vtp
    Body Distalphalanx2: mass=0.00584 mass_center=(0 -0.01 0) inertia=(0.20853 0.43472 0.20853 0 0 0)
        meshes=fingers4.vtp
    Body Proximalphalanx3: mass=0.01496 mass_center=(-0.005 -0.1063 0.0115) inertia=(0.64411 4.13694 0.64411 0 0 0)
        meshes=fingers7.vtp
    Body Medialphalanx3: mass=0.00641 mass_center=(-0.004 -0.152 0.0145) inertia=(0.22885 0.55121 0.22885 0 0 0)
        meshes=fingers6.vtp
    Body Distalphalanx3: mass=0.00584 mass_center=(-0.0024 -0.179 0.0183) inertia=(0.20853 0.43472 0.20853 0 0 0)
        meshes=fingers5.vtp
    Body Proximalphalanx4: mass=0.00991 mass_center=(0.0015 -0.104 -0.0105) inertia=(0.34895 1.82809 0.34895 0 0 0)
        meshes=fingers11.vtp
      WrapCylinder Wrap_MCP4: translation=(0.0015 -0.077 -0.0105) quadrant=all radius=0.008 length=0.014
    Body Medialphalanx4: mass=0.00577 mass_center=(0.0016 -0.147 -0.0059) inertia=(0.16742 0.56728 0.16742 0 0 0)
        meshes=fingers10.vtp
      WrapCylinder Wrap_PP4: translation=(-0.001 -0.129 -0.005) quadrant=all radius=0.0035 length=0.015
    Body Distalphalanx4: mass=0.00483 mass_center=(-0.0011 -0.1691 0.0004) inertia=(0.14 0.35276 0.14 0 0 0)
        meshes=fingers9.vtp
      WrapCylinder Wrap_DP4: translation=(0.0003 -0.16 -0.0017) quadrant=all radius=0.003 length=0.01
    Body Proximalphalanx5: mass=0.0065 mass_center=(0.0038 -0.086 -0.0374) inertia=(0.16822 0.9479 0.16822 0 0 0)
        meshes=fingers15.vtp
    Body Medialphalanx5: mass=0.00349 mass_center=(0.005 -0.121 -0.0345) inertia=(0.07802 0.21969 0.07802 0 0 0)
        meshes=fingers14.vtp
    Body Distalphalanx5: mass=0.00266 mass_center=(0.0035 -0.1405 -0.0338) inertia=(0.05928 0.1089 0.05928 0 0 0)
        meshes=fingers13.vtp
    Body Cylinder: mass=0.1 mass_center=(0.05 0.05 0.1) inertia=(1 1 1 0 0 0)
      Cylinder Cylinder_geom_1: radius=0.03 half_height=0.1
  JointSet:
    CustomJoint radioulnar: socket_parent_frame=ulna_offset socket_child_frame=radius_offset
      Coordinate pro_sup: default_value=1.815142 range=(0 3.141593) clamped=true
      PhysicalOffsetFrame ulna_offset: socket_parent=/bodyset/ulna translation=(-0.0065 -0.008 0.027) [meters]
      PhysicalOffsetFrame radius_offset: socket_parent=/bodyset/radius translation=(0 0 0)
      SpatialTransform: axes_held_at_zero=(rotation1 rotation3 translation1 translation2 translation3)
        TransformAxis rotation2: coordinates=pro_sup axis=(0.05639802 0.9835774 -0.1714491)
            LinearFunction(coefficients=1 0)
    WeldJoint rad-rotaxis: socket_parent_frame=radius_offset socket_child_frame=rotaxis_offset
      PhysicalOffsetFrame radius_offset: socket_parent=/bodyset/radius translation=(-0.0085 -0.2313 0.0561)
          orientation=(-0.261799 0.392699 0) [radians]
      PhysicalOffsetFrame rotaxis_offset: socket_parent=/bodyset/rotaxis translation=(0 0 0)
    CustomJoint rotaxis-auxprfem: socket_parent_frame=rotaxis_offset socket_child_frame=auxprfem_offset
      Coordinate rotaxis_auxprfem_r3: default_value=0 range=(-99999.9 99999.9) clamped=false
      PhysicalOffsetFrame rotaxis_offset: socket_parent=/bodyset/rotaxis translation=(-0.001 0.009 0)
      PhysicalOffsetFrame auxprfem_offset: socket_parent=/bodyset/auxprfem translation=(0 0 0)
      SpatialTransform: axes_held_at_zero=(rotation1 rotation2 translation1 translation2 translation3)
        TransformAxis rotation3: coordinates=rotaxis_auxprfem_r3 axis=(0 0 1) LinearFunction(coefficients=1 0)
    CustomJoint auxprfem-auxprrud: socket_parent_frame=auxprfem_offset socket_child_frame=auxprrud_offset
      Coordinate auxprfem-auxprrud_coord: default_value=0 range=(-0.4363323 0.6108652) clamped=false
      PhysicalOffsetFrame auxprfem_offset: socket_parent=/bodyset/auxprfem translation=(0 0 0)
      PhysicalOffsetFrame auxprrud_offset: socket_parent=/bodyset/auxprrud translation=(0 0 0)
      SpatialTransform: axes_held_at_zero=(rotation2 rotation3 translation1 translation2 translation3)
        TransformAxis rotation1: coordinates=auxprfem-auxprrud_coord axis=(1 0 0) LinearFunction(coefficients=1 0)
    CustomJoint auxprrud-auxdrfem: socket_parent_frame=auxprrud_offset socket_child_frame=auxdrfem_offset
      Coordinate auxprrud_auxdrfem_r3: default_value=0 range=(-99999.9 99999.9) clamped=false
      PhysicalOffsetFrame auxprrud_offset: socket_parent=/bodyset/auxprrud translation=(0.001 -0.02 0)
      PhysicalOffsetFrame auxdrfem_offset: socket_parent=/bodyset/auxdrfem translation=(0 0 0)
      SpatialTransform: axes_held_at_zero=(rotation1 rotation2 translation1 translation2 translation3)
        TransformAxis rotation3: coordinates=auxprrud_auxdrfem_r3 axis=(0 0 1) LinearFunction(coefficients=1 0)
    CustomJoint auxdrfem-auxdrrud: socket_parent_frame=auxdrfem_offset socket_child_frame=auxdrrud_offset
      Coordinate auxdrfem_auxdrrud_r1: default_value=0 range=(-99999.9 99999.9) clamped=false
      PhysicalOffsetFrame auxdrfem_offset: socket_parent=/bodyset/auxdrfem translation=(0 0 0)
      PhysicalOffsetFrame auxdrrud_offset: socket_parent=/bodyset/auxdrrud translation=(0 0 0)
      SpatialTransform: axes_held_at_zero=(rotation2 rotation3 translation1 translation2 translation3)
        TransformAxis rotation1: coordinates=auxdrfem_auxdrrud_r1 axis=(1 0 0) LinearFunction(coefficients=1 0)
    WeldJoint prox-scaph: socket_parent_frame=auxprrud_offset socket_child_frame=scaphoid_offset
      PhysicalOffsetFrame auxprrud_offset: socket_parent=/bodyset/auxprrud translation=(-0.0035 -0.0025 0.009)
          orientation=(0.401426 0 0)
      PhysicalOffsetFrame scaphoid_offset: socket_parent=/bodyset/scaphoid translation=(0 0 0)
    WeldJoint prox-lun: socket_parent_frame=auxprrud_offset socket_child_frame=lunate_offset
      PhysicalOffsetFrame auxprrud_offset: socket_parent=/bodyset/auxprrud translation=(-0.004 -0.0015 -0.007)
      PhysicalOffsetFrame lunate_offset: socket_parent=/bodyset/lunate translation=(0 0 0)
    WeldJoint dist-trpzm: socket_parent_frame=auxdrrud_offset socket_child_frame=trapezium_offset
      PhysicalOffsetFrame auxdrrud_offset: socket_parent=/bodyset/auxdrrud translation=(0.0035 -0.0035 0.02)
          orientation=(-0.261799 0 0)
      PhysicalOffsetFrame trapezium_offset: socket_parent=/bodyset/trapezium translation=(0 0 0)
    WeldJoint dist-trpzd: socket_parent_frame=auxdrrud_offset socket_child_frame=trapezoid_offset
      PhysicalOffsetFrame auxdrrud_offset: socket_parent=/bodyset/auxdrrud translation=(-0.0015 -0.0044 0.0134)
          orientation=(0.349066 -0.174533 0)
      PhysicalOffsetFrame trapezoid_offset: socket_parent=/bodyset/trapezoid translation=(0 0 0)
    WeldJoint dist-cap: socket_parent_frame=auxdrrud_offset socket_child_frame=capitate_offset
      PhysicalOffsetFrame auxdrrud_offset: socket_parent=/bodyset/auxdrrud translation=(-0.0155 -0.0018 -0.0055)
          orientation=(0.174533 0 0)
      PhysicalOffsetFrame capitate_offset: socket_parent=/bodyset/capitate translation=(0 0 0)
    WeldJoint prox-pis: socket_parent_frame=auxprrud_offset socket_child_frame=pisiform_offset
      PhysicalOffsetFrame auxprrud_offset: socket_parent=/bodyset/auxprrud translation=(0.005 -0.015 -0.0201)
      PhysicalOffsetFrame pisiform_offset: socket_parent=/bodyset/pisiform translation=(0 0 0)
    WeldJoint prox-triq: socket_parent_frame=auxprrud_offset socket_child_frame=triquetrum_offset
      PhysicalOffsetFrame auxprrud_offset: socket_parent=/bodyset/auxprrud translation=(-0.0055 -0.01 -0.021)
      PhysicalOffsetFrame triquetrum_offset: socket_parent=/bodyset/triquetrum translation=(0 0 0)
    WeldJoint dist-ham: socket_parent_frame=auxdrrud_offset socket_child_frame=hamate_offset
      PhysicalOffsetFrame auxdrrud_offset: socket_parent=/bodyset/auxdrrud translation=(-0.006 -0.005 -0.0175)
          orientation=(-0.20944 0 0)
      PhysicalOffsetFrame hamate_offset: socket_parent=/bodyset/hamate translation=(0 0 0)
    WeldJoint auxCMC: socket_parent_frame=auxdrrud_offset socket_child_frame=carp_metacarp_offset
      PhysicalOffsetFrame auxdrrud_offset: socket_parent=/bodyset/auxdrrud translation=(0 0 0)
      PhysicalOffsetFrame carp_metacarp_offset: socket_parent=/bodyset/carp_metacarp translation=(0 0 0)
    WeldJoint CMC2: socket_parent_frame=carp_metacarp_offset socket_child_frame=metacarpal2_offset
      PhysicalOffsetFrame carp_metacarp_offset: socket_parent=/bodyset/carp_metacarp
          translation=(-0.0047 -0.0095 -0.005) orientation=(0.174533 0.261799 0)
      PhysicalOffsetFrame metacarpal2_offset: socket_parent=/bodyset/metacarpal2 translation=(0 0 0)
    WeldJoint CMC3: socket_parent_frame=carp_metacarp_offset socket_child_frame=metacarpal3_offset
      PhysicalOffsetFrame carp_metacarp_offset: socket_parent=/bodyset/carp_metacarp
          translation=(-0.0047 -0.0085 -0.005) orientation=(0.0872665 0.174533 0.0872665)
      PhysicalOffsetFrame metacarpal3_offset: socket_parent=/bodyset/metacarpal3 translation=(0 0 0)
    WeldJoint CMC4: socket_parent_frame=carp_metacarp_offset socket_child_frame=metacarpal4_offset
      PhysicalOffsetFrame carp_metacarp_offset: socket_parent=/bodyset/carp_metacarp
          translation=(-0.0047 -0.008 -0.0033) orientation=(0.0872665 0.174533 0.0872665)
      PhysicalOffsetFrame metacarpal4_offset: socket_parent=/bodyset/metacarpal4 translation=(0 0 0)
    WeldJoint CMC5: socket_parent_frame=carp_metacarp_offset socket_child_frame=metacarpal5_offset
      PhysicalOffsetFrame carp_metacarp_offset: socket_parent=/bodyset/carp_metacarp translation=(-0.002 -0.01 0.0035)
          orientation=(0.0872665 0.174533 0.0872665)
      PhysicalOffsetFrame metacarpal5_offset: socket_parent=/bodyset/metacarpal5 translation=(0 0 0)
    CustomJoint Wrist: socket_parent_frame=rotaxis_offset socket_child_frame=imagine_offset
      Coordinate deviation: default_value=0.1745329 range=(-0.436332 0.610865) clamped=true
      Coordinate flexion: default_value=0 range=(-1.22173 1.22173) clamped=false
      PhysicalOffsetFrame rotaxis_offset: socket_parent=/bodyset/rotaxis translation=(0 0 0)
      PhysicalOffsetFrame imagine_offset: socket_parent=/bodyset/imagine translation=(0 0 0)
      SpatialTransform: axes_held_at_zero=(rotation2 translation1 translation2 translation3)
        TransformAxis rotation1: coordinates=deviation axis=(1 0 0) LinearFunction(coefficients=1 0)
        TransformAxis rotation3: coordinates=flexion axis=(0 0 1) LinearFunction(coefficients=1 0)
    FreeJoint initpos: socket_parent_frame=ground_offset socket_child_frame=humerus_offset
      Coordinate init_x_rot: default_value=0
      Coordinate init_y_rot: default_value=0
      Coordinate init_z_rot: default_value=0
      Coordinate init_x_tran: default_value=0
      Coordinate init_y_tran: default_value=0
      Coordinate init_z_tran: default_value=0
      PhysicalOffsetFrame ground_offset: socket_parent=/ground translation=(0 0 0)
      PhysicalOffsetFrame humerus_offset: socket_parent=/bodyset/humerus translation=(0 0 0)
    PinJoint elbow_new: socket_parent_frame=humerus_offset socket_child_frame=ulna_offset
      Coordinate elbow: default_value=0.5235988 range=(0 2.268928) clamped=true locked=true
      PhysicalOffsetFrame humerus_offset: socket_parent=/bodyset/humerus translation=(0.0127 -0.274 0.0389)
      PhysicalOffsetFrame ulna_offset: socket_parent=/bodyset/ulna translation=(0 0 0)
    UniversalJoint CMC1: socket_parent_frame=trapezium_offset socket_child_frame=metacarpal1_offset
      Coordinate thumb_flex: default_value=1.134464 range=(-0.3490659 1.22173) clamped=true
      Coordinate thumb_abd: default_value=0.6981317 range=(-0.2617994 0.8726646) clamped=true
      PhysicalOffsetFrame trapezium_offset: socket_parent=/bodyset/trapezium translation=(0 0 0)
          orientation=(0.7853982 0 0.3490659)
      PhysicalOffsetFrame metacarpal1_offset: socket_parent=/bodyset/metacarpal1 translation=(0 0 0)
          orientation=(0.7853982 0 0.3490659)
    UniversalJoint MCP1: socket_parent_frame=metacarpal1_offset socket_child_frame=Proximalphalanx1_offset
      Coordinate MCP1_flex: default_value=-0.1745329 range=(-0.4363323 1.047198) clamped=true
      Coordinate MCP1_abd: default_value=0 range=(-0.2617994 0.2617994) clamped=true
      PhysicalOffsetFrame metacarpal1_offset: socket_parent=/bodyset/metacarpal1 translation=(0 -0.038 0.04)
          orientation=(-2.356194 0 -0.5235988)
      PhysicalOffsetFrame Proximalphalanx1_offset: socket_parent=/bodyset/Proximalphalanx1 translation=(0 -0.038 0.04)
          orientation=(-2.356194 0 -0.5235988)
    PinJoint IP: socket_parent_frame=Proximalphalanx1_offset socket_child_frame=Distalphalanx1_offset
      Coordinate IP: default_value=-0.3490659 range=(-0.4363323 0.8726646) clamped=true
      PhysicalOffsetFrame Proximalphalanx1_offset: socket_parent=/bodyset/Proximalphalanx1
          translation=(0.01 -0.07 0.055) orientation=(0 1.322776 0)
      PhysicalOffsetFrame Distalphalanx1_offset: socket_parent=/bodyset/Distalphalanx1 translation=(0.01 -0.07 0.055)
          orientation=(0 1.322776 0)
    UniversalJoint MCP2: socket_parent_frame=metacarpal2_offset socket_child_frame=Proximalphalanx2_offset
      Coordinate MCP2_abd: default_value=-0.1745329 range=(-0.3490659 0.3490659) clamped=true
      Coordinate MCP2_flex: default_value=0 range=(-0.08726646 1.745329) clamped=true
      PhysicalOffsetFrame metacarpal2_offset: socket_parent=/bodyset/metacarpal2 translation=(-0.0024 -0.0685 0.045)
          orientation=(1.413717 0 0)
      PhysicalOffsetFrame Proximalphalanx2_offset: socket_parent=/bodyset/Proximalphalanx2 translation=(0 0 0)
          orientation=(1.413717 0 0)
    PinJoint PIP2: socket_parent_frame=Proximalphalanx2_offset socket_child_frame=Medialphalanx2_offset
      Coordinate PIP2: default_value=0 range=(-0.08726646 1.745329) clamped=true
      PhysicalOffsetFrame Proximalphalanx2_offset: socket_parent=/bodyset/Proximalphalanx2
          translation=(0.0005 -0.04826 0.008) orientation=(-0.1570796 0 0)
      PhysicalOffsetFrame Medialphalanx2_offset: socket_parent=/bodyset/Medialphalanx2 translation=(0 0 0)
          orientation=(-0.1570796 0 0)
    PinJoint DIP2: socket_parent_frame=Medialphalanx2_offset socket_child_frame=Distalphalanx2_offset
      Coordinate DIP2: default_value=0 range=(-0.08726646 1.745329) clamped=true
      PhysicalOffsetFrame Medialphalanx2_offset: socket_parent=/bodyset/Medialphalanx2
          translation=(0.00193 -0.03277 0.00472) orientation=(-0.1570796 0 0)
      PhysicalOffsetFrame Distalphalanx2_offset: socket_parent=/bodyset/Distalphalanx2 translation=(0 0 0)
          orientation=(-0.1570796 0 0)
    UniversalJoint MCP3: socket_parent_frame=metacarpal3_offset socket_child_frame=Proximalphalanx3_offset
      Coordinate MCP3_abd: default_value=0 range=(-0.3490659 0.3490659) clamped=true
      Coordinate MCP3_flex: default_value=0 range=(-0.08726646 1.570796) clamped=true
      PhysicalOffsetFrame metacarpal3_offset: socket_parent=/bodyset/metacarpal3 translation=(-0.005 -0.0785 0.0109)
          orientation=(1.413717 0 0)
      PhysicalOffsetFrame Proximalphalanx3_offset: socket_parent=/bodyset/Proximalphalanx3
          translation=(-0.005 -0.0785 0.0109) orientation=(1.413717 0 0)
    PinJoint PIP3: socket_parent_frame=Proximalphalanx3_offset socket_child_frame=Medialphalanx3_offset
      Coordinate PIP3: default_value=0 range=(-0.08726646 1.745329) clamped=true
      PhysicalOffsetFrame Proximalphalanx3_offset: socket_parent=/bodyset/Proximalphalanx3
          translation=(-0.005 -0.132 0.02) orientation=(-0.1570796 0 0)
      PhysicalOffsetFrame Medialphalanx3_offset: socket_parent=/bodyset/Medialphalanx3 translation=(-0.005 -0.132 0.02)
          orientation=(-0.1570796 0 0)
    PinJoint DIP3: socket_parent_frame=Medialphalanx3_offset socket_child_frame=Distalphalanx3_offset
      Coordinate DIP3: default_value=0 range=(-0.08726646 1.745329) clamped=true
      PhysicalOffsetFrame Medialphalanx3_offset: socket_parent=/bodyset/Medialphalanx3
          translation=(-0.00294 -0.168 0.023) orientation=(-0.1570796 0 0)
      PhysicalOffsetFrame Distalphalanx3_offset: socket_parent=/bodyset/Distalphalanx3
          translation=(-0.00294 -0.165 0.023) orientation=(-0.1570796 0 0)
    UniversalJoint MCP4: socket_parent_frame=metacarpal4_offset socket_child_frame=Proximalphalanx4_offset
      Coordinate MCP4_abd: default_value=0.08726646 range=(-0.3490659 0.3490659) clamped=true
      Coordinate MCP4_flex: default_value=0 range=(-0.08726646 1.745329) clamped=true
      PhysicalOffsetFrame metacarpal4_offset: socket_parent=/bodyset/metacarpal4 translation=(0 -0.077 -0.0109)
          orientation=(1.570796 0 0)
      PhysicalOffsetFrame Proximalphalanx4_offset: socket_parent=/bodyset/Proximalphalanx4
          translation=(0 -0.077 -0.0109) orientation=(1.570796 0 0)
    PinJoint PIP4: socket_parent_frame=Proximalphalanx4_offset socket_child_frame=Medialphalanx4_offset
      Coordinate PIP4: default_value=0 range=(-0.08726646 1.745329) clamped=true
      PhysicalOffsetFrame Proximalphalanx4_offset: socket_parent=/bodyset/Proximalphalanx4
          translation=(-0.001 -0.129 -0.005)
      PhysicalOffsetFrame Medialphalanx4_offset: socket_parent=/bodyset/Medialphalanx4
          translation=(-0.001 -0.129 -0.005)
    PinJoint DIP4: socket_parent_frame=Medialphalanx4_offset socket_child_frame=Distalphalanx4_offset
      Coordinate DIP4: default_value=0 range=(-0.08726646 1.745329) clamped=true
      PhysicalOffsetFrame Medialphalanx4_offset: socket_parent=/bodyset/Medialphalanx4
          translation=(0.0003 -0.16 -0.0017)
      PhysicalOffsetFrame Distalphalanx4_offset: socket_parent=/bodyset/Distalphalanx4
          translation=(0.0003 -0.16 -0.0017)
    UniversalJoint MCP5: socket_parent_frame=metacarpal5_offset socket_child_frame=Proximalphalanx5_offset
      Coordinate MCP5_abd: default_value=0.4363323 range=(-0.3490659 0.5235988) clamped=true
      Coordinate MCP5_flex: default_value=0 range=(-0.08726646 1.570796) clamped=true
      PhysicalOffsetFrame metacarpal5_offset: socket_parent=/bodyset/metacarpal5 translation=(0.0015 -0.064 -0.0397)
          orientation=(1.570796 0 0)
      PhysicalOffsetFrame Proximalphalanx5_offset: socket_parent=/bodyset/Proximalphalanx5
          translation=(0.0015 -0.064 -0.0397) orientation=(1.570796 0 0)
    PinJoint PIP5: socket_parent_frame=Proximalphalanx5_offset socket_child_frame=Medialphalanx5_offset
      Coordinate PIP5: default_value=0 range=(-0.08726646 1.745329) clamped=true
      PhysicalOffsetFrame Proximalphalanx5_offset: socket_parent=/bodyset/Proximalphalanx5
          translation=(0.005 -0.108 -0.035)
      PhysicalOffsetFrame Medialphalanx5_offset: socket_parent=/bodyset/Medialphalanx5
          translation=(0.005 -0.108 -0.035)
    PinJoint DIP5: socket_parent_frame=Medialphalanx5_offset socket_child_frame=Distalphalanx5_offset
      Coordinate DIP5: default_value=0 range=(-0.08726646 1.570796) clamped=true
      PhysicalOffsetFrame Medialphalanx5_offset: socket_parent=/bodyset/Medialphalanx5
          translation=(0.004 -0.134 -0.034)
      PhysicalOffsetFrame Distalphalanx5_offset: socket_parent=/bodyset/Distalphalanx5
          translation=(0.006 -0.134 -0.034)
    FreeJoint Cylindertoground: socket_parent_frame=ground_offset socket_child_frame=Cylinder_offset
      Coordinate Cylinder_x_rot
      Coordinate Cylinder_y_rot
      Coordinate Cylinder_z_rot
      Coordinate Cylinder_x_tran: default_value=0.15
      Coordinate Cylinder_y_tran: default_value=-0.04
      Coordinate Cylinder_z_tran: default_value=0.013
      PhysicalOffsetFrame ground_offset: socket_parent=/ground translation=(0 -0.6 0)
          orientation=(1.570796 0 0.7853982)
      PhysicalOffsetFrame Cylinder_offset: socket_parent=/bodyset/Cylinder translation=(0 0 0)
  ConstraintSet:
    CoordinateCouplerConstraint rotaxis_auxprfem_r3_con: independent_coordinate_names=flexion
        dependent_coordinate_name=rotaxis_auxprfem_r3 scale_factor=1
      coupled_coordinates_function: SimmSpline: x=(-1.5708 1.5708) y=(-0.785398 0.785398)
    CoordinateCouplerConstraint auxprrud_auxdrfem_r3_con: independent_coordinate_names=flexion
        dependent_coordinate_name=auxprrud_auxdrfem_r3 scale_factor=1
      coupled_coordinates_function: SimmSpline: x=(-1.22173 1.22173) y=(-0.610865 0.610865)
    CoordinateCouplerConstraint auxprfem-auxprrud_coord_con: independent_coordinate_names=deviation
        dependent_coordinate_name=auxprfem-auxprrud_coord scale_factor=1
      coupled_coordinates_function: SimmSpline: x=(-0.436332 0 0.610865) y=(-0.218166 0 0.305432)
    CoordinateCouplerConstraint auxdrfem_auxdrrud_r1_con: independent_coordinate_names=deviation
        dependent_coordinate_name=auxdrfem_auxdrrud_r1 scale_factor=1
      coupled_coordinates_function: SimmSpline: x=(-0.436332 0 0.610865) y=(-0.218166 0 0.305432)
  ForceSet:
    Millard2012EquilibriumMuscle [values shared by the 14 below unless stated]: min_control=0.01 max_control=1
        minimum_activation=0.01
      ActiveForceLengthCurve: minimum_value=0
      ForceVelocityCurve: concentric_slope_at_vmax=0 concentric_slope_near_vmax=0.25 isometric_slope=5
          eccentric_slope_at_vmax=0 eccentric_slope_near_vmax=0.15 max_eccentric_velocity_force_multiplier=1.4
      FiberForceLengthCurve
      TendonForceLengthCurve
    Millard2012EquilibriumMuscle FCR: max_isometric_force=59.7 optimal_fiber_length=0.0628 tendon_slack_length=0.2185
        pennation_angle_at_optimal=0.0541 [radians]
      PathPoint FCR_P1: humerus (0.00639 -0.274 0.01313)
      PathPoint FCR_P2: radius (0.004 -0.217 0.056)
      PathPoint FCR_P3: trapezoid (0.01395 -0.0012 -0.0067)
      PathPoint FCR_P4: metacarpal2 (0.00592 0.00269 0.01328)
    Millard2012EquilibriumMuscle FCU: max_isometric_force=128.6 optimal_fiber_length=0.0509 tendon_slack_length=0.265
        pennation_angle_at_optimal=0.2111848
      PathPoint FCU_P1: humerus (0.00463 -0.2777 0.01318)
      PathPoint FCU_P2: ulna (-0.00465 -0.22771 0.05589)
      PathPoint FCU_P3: ulna (-0.027 -0.228 0.047)
      PathPoint FCU_P4: hamate (0.012 -0.008 -0.001)
      PathPoint FCU_P6: metacarpal5 (0.00845 -0.009 -0.01963)
      PathWrap FCU: wrap_object=Wrap_Wrist_FCU
    Millard2012EquilibriumMuscle ECU: max_isometric_force=117 optimal_fiber_length=0.0622 tendon_slack_length=0.231
        pennation_angle_at_optimal=0.06108652
      PathPoint ECU_P1: humerus (0.02268 -0.268 0.06679)
      PathPoint ECU_P2: radius (-0.00239 -0.01019 0.01329)
      PathPoint ECU_P3: radius (-0.01094 -0.03546 0.01362)
      PathPoint ECU_P4: ulna (-0.02457 -0.09422 0.03348)
      PathPoint ECU_P5: ulna (-0.02463 -0.1364 0.04159)
      PathPoint ECU_P6: ulna (-0.026 -0.192 0.06)
      PathPoint ECU_P7: radius (-0.01789 -0.19788 0.06459)
      PathPoint ECU_P8: radius (-0.007 -0.208 0.074)
      PathPoint ECU_P9: metacarpal3 (-0.009 0.006 0.019)
      PathPoint ECU_P10: metacarpal3 (-0.01502 -0.00464 0.01507)
    Millard2012EquilibriumMuscle ED5: max_isometric_force=18 optimal_fiber_length=0.065 tendon_slack_length=0.3495
        pennation_angle_at_optimal=0.03490659
      PathPoint ED5_P1: humerus (0.01056 -0.2679 0.07127)
      PathPoint ED5_P2: radius (-0.0082 -0.04004 0.01668)
      PathPoint ED5_P3: radius (-0.01974 -0.18469 0.04807)
      PathPoint ED5_P4: radius (-0.02211 -0.21097 0.05287)
      PathPoint ED5_P5: scaphoid (-0.01357 -0.0079 -0.01241)
      PathPoint ED5_P6: capitate (-0.00192 -0.01151 0.00084)
      PathPoint ED5_P7: metacarpal3 (-0.01096 -0.02472 -0.01035)
      PathPoint ED5_P8: metacarpal5 (-0.007 -0.06 -0.036)
      PathPoint ED5_P_A1: Proximalphalanx5 (-0.005 -0.072 -0.036)
      PathPoint ED5_P9: Proximalphalanx5 (-0.002 -0.104 -0.035)
      PathPoint ED5_P_A2: Medialphalanx5 (-0.002 -0.115 -0.035)
      PathPoint ED5_P_A3: Medialphalanx5 (-0.002 -0.132 -0.033)
      PathPoint ED5_P10: Distalphalanx5 (0.00129 -0.13957 -0.03333)
    Millard2012EquilibriumMuscle ED4: max_isometric_force=38.7 optimal_fiber_length=0.0626 tendon_slack_length=0.39
        pennation_angle_at_optimal=0.05235988
      PathPoint ED4_P1: humerus (0.01011 -0.2679 0.07127)
      PathPoint ED4_P2: radius (-0.0082 -0.04004 0.01668)
      PathPoint ED4_P3: radius (-0.01766 -0.18446 0.04898)
      PathPoint ED4_P4: radius (-0.02021 -0.21054 0.05596)
      PathPoint ED4_P5: scaphoid (-0.01286 -0.0042 -0.01106)
      PathPoint ED4_P6: metacarpal3 (-0.00903 0.00837 -0.00741)
      PathPoint ED4_P7: metacarpal4 (-0.009 -0.075 -0.01001)
      PathPoint ED4_P_A1: Proximalphalanx4 (-0.007 -0.0864 -0.01001)
      PathPoint ED4_P8: Proximalphalanx4 (-0.0065 -0.13 -0.00859)
      PathPoint ED4_P_A2: Medialphalanx4 (-0.006 -0.13604 -0.00859)
      PathPoint ED4_P_A3: Medialphalanx4 (-0.005 -0.159 -0.005)
      PathPoint ED4_P9: Distalphalanx4 (-0.00093 -0.16987 -0.00249)
    Millard2012EquilibriumMuscle ED3: max_isometric_force=45.9 optimal_fiber_length=0.0724 tendon_slack_length=0.39
        pennation_angle_at_optimal=0.05235988
      PathPoint ED3_P1: humerus (0.01011 -0.2679 0.07127)
      PathPoint ED3_P2: radius (-0.0082 -0.04004 0.01668)
      PathPoint ED3_P3: radius (-0.01675 -0.18466 0.04682)
      PathPoint ED3_P4: radius (-0.01933 -0.21054 0.05152)
      PathPoint ED3_P5: scaphoid (-0.01198 -0.00332 -0.01283)
      PathPoint ED3_P6: metacarpal3 (-0.01257 0.00659 -0.00208)
      PathPoint ED3_P7: metacarpal3 (-0.02 -0.073 0.011)
      PathPoint ED3_P_A1: Proximalphalanx3 (-0.02 -0.088 0.013)
      PathPoint ED3_P8: Proximalphalanx3 (-0.013 -0.131 0.019)
      PathPoint ED3_P_A2: Medialphalanx3 (-0.011 -0.144 0.021)
      PathPoint ED3_P_A3: Medialphalanx3 (-0.009 -0.164 0.024)
      PathPoint ED3_P9: Distalphalanx3 (-0.00737 -0.17492 0.02576)
    Millard2012EquilibriumMuscle ED2: max_isometric_force=23.4 optimal_fiber_length=0.07 tendon_slack_length=0.385
        pennation_angle_at_optimal=0.05235988
      PathPoint ED2_P1: humerus (0.01011 -0.2679 0.07127)
      PathPoint ED2_P2: radius (-0.0082 -0.04004 0.01668)
      PathPoint ED2_P3: radius (-0.02209 -0.18446 0.04898)
      PathPoint ED2_P4: radius (-0.02376 -0.21054 0.0533)
      PathPoint ED2_P5: scaphoid (-0.01359 -0.00761 -0.01108)
      PathPoint ED2_P6: capitate (-0.00196 -0.00655 0.00232)
      PathPoint ED2_P7: metacarpal3 (-0.01421 -0.01886 0.0078)
      PathPoint ED2_P8: metacarpal2 (-0.011 -0.075 0.041)
      PathPoint ED2_P_A1: Proximalphalanx2 (-0.008 -0.013 -0.004)
      PathPoint ED2_P9: Proximalphalanx2 (-0.004 -0.051 0.004)
      PathPoint ED2_P_A2: Medialphalanx2 (-0.003 -0.015 -0.002)
      PathPoint ED2_P_A3: Medialphalanx2 (-0.002 -0.036 0.003)
      PathPoint ED2_P10: Distalphalanx2 (-0.00291 -0.01043 0)
    Millard2012EquilibriumMuscle ECRL: max_isometric_force=65.7 optimal_fiber_length=0.0936 tendon_slack_length=0.2026
        pennation_angle_at_optimal=0.04363323
      PathPoint ECRL_P1: humerus (0.01337 -0.2611 0.07069)
      PathPoint ECRL_P2: humerus (0.02239 -0.2683 0.06679)
      PathPoint ECRL_P3: radius (-0.00136 -0.12953 0.05532)
      PathPoint ECRL_P4: radius (-0.008 -0.209 0.069)
      PathPoint ECRL_P5: metacarpal2 (-0.016 0.011 0.021)
      PathPoint ECRL_P6: metacarpal2 (-0.01108 -0.01106 0.02568)
    Millard2012EquilibriumMuscle EI: max_isometric_force=25.2 optimal_fiber_length=0.0589 tendon_slack_length=0.24804
        pennation_angle_at_optimal=0.1047198
      PathPoint EI_P1: ulna (-0.01974 -0.14668 0.04449)
      PathPoint EI_P2: radius (-0.01612 -0.20811 0.05228)
      PathPoint EI_P3: scaphoid (-0.01119 -0.00448 -0.00483)
      PathPoint EI_P4: metacarpal2 (-0.01312 0.00595 0.0075)
      PathPoint EI_P5: metacarpal2 (-0.011 -0.075 0.041)
      PathPoint EI_P_A1: Proximalphalanx2 (-0.008 -0.013 -0.004)
      PathPoint EI_P_A2: Proximalphalanx2 (-0.004 -0.051 0.004)
      PathPoint ED2_P_A3: Medialphalanx2 (-0.003 -0.015 -0.002)
      PathPoint ED2_P_A4: Medialphalanx2 (-0.002 -0.036 0.003)
      PathPoint EI_P6: Distalphalanx2 (-0.00452 -0.0182 0.00396)
    Millard2012EquilibriumMuscle ABPL: max_isometric_force=57.9 optimal_fiber_length=0.0713 tendon_slack_length=0.125
        pennation_angle_at_optimal=0.1308997
      PathPoint ABPL_P1: radius (-0.00494 -0.09677 0.03004)
      PathPoint ABPL_P2: radius (-0.00892 -0.13772 0.05255)
      PathPoint ABPL_P3: radius (-0.0066 -0.15947 0.06132)
      PathPoint ABPL_P4: radius (-0.00682 -0.17731 0.06462)
      PathPoint ABPL_P5: radius (-0.00282 -0.20831 0.07607)
      PathPoint ABPL_P6: radius (0.00117 -0.21506 0.07845)
      PathPoint ABPL_P7: trapezium (0.007 0.011 0.011)
      PathPoint ABPL_P8: metacarpal1 (0.006 -0.005 0.015)
      PathPoint ABPL_P9: metacarpal1 (0.00816 -0.02324 0.03082)
    Millard2012EquilibriumMuscle FDS2: max_isometric_force=51.3 optimal_fiber_length=0.0835 tendon_slack_length=0.338
        pennation_angle_at_optimal=0.1047198
      PathPoint FDS2_P1: humerus (0.0035 -0.2945 0.03226)
      PathPoint FDS2_P2: radius (0.01091 -0.21436 0.04048)
      PathPoint FDS2_P3: radius (0.01091 -0.21436 0.04048)
      PathPoint FDS2_P4: capitate (0.02244 0.01397 0.00139)
      PathPoint FDS2_P5: capitate (0.02703 0.00411 0.00444)
      PathPoint FDS2_P6: capitate (0.02944 -0.01143 0.00869)
      PathPoint FDS2_P7: metacarpal2 (0.01297 -0.01437 0.02183)
      PathPoint FDS2_P8: metacarpal2 (0.008 -0.05 0.036)
      PathPoint FDS2_A1: Proximalphalanx2 (0.007 -0.011 -0.001)
      PathPoint FDS2_P9: Proximalphalanx2 (0.005 -0.041 0.005)
      PathPoint FDS2_A2: Medialphalanx2 (0.005 -0.011 0.001)
      PathPoint FDS2_A3: Medialphalanx2 (0.007 -0.028 0.004)
      PathPoint FDS2_P10: Distalphalanx2 (0.00581 -0.0059 0.00263)
    Millard2012EquilibriumMuscle FDS3: max_isometric_force=75.9 optimal_fiber_length=0.0749 tendon_slack_length=0.354
        pennation_angle_at_optimal=0.1221731
      PathPoint FDS3_P1: humerus (0.0035 -0.2945 0.03226)
      PathPoint FDS3_P2: radius (0.01048 -0.21423 0.03978)
      PathPoint FDS3_P3: radius (0.0019 -0.2167 0.0438)
      PathPoint FDS3_P4: capitate (0.02277 0.01364 0.00172)
      PathPoint FDS3_P5: capitate (0.0269 0.0054 0.0037)
      PathPoint FDS3_P6: capitate (0.03 -0.0118 0.0084)
      PathPoint FDS3_P7: metacarpal3 (0.0144 -0.01632 0.01008)
      PathPoint FDS3_P8: metacarpal3 (0.009 -0.056 0.01)
      PathPoint FDS3_A1: Proximalphalanx3 (0.007 -0.096 0.016)
      PathPoint FDS3_P9: Proximalphalanx3 (0.001 -0.124 0.018)
      PathPoint FDS3_A2: Medialphalanx3 (0.001 -0.141 0.02)
      PathPoint FDS3_A3: Medialphalanx3 (0.004 -0.163 0.024)
      PathPoint FDS3_P10: Distalphalanx3 (0.00028 -0.17254 0.02483)
    Millard2012EquilibriumMuscle FDS4: max_isometric_force=48.3 optimal_fiber_length=0.0736 tendon_slack_length=0.3535
        pennation_angle_at_optimal=0.06981317
      PathPoint FDS4_P1: humerus (0.0035 -0.2945 0.03226)
      PathPoint FDS4_P2: radius (0.01037 -0.21504 0.03862)
      PathPoint FDS4_P3: radius (-0.00037 -0.21764 0.0409)
      PathPoint FDS4_P4: capitate (0.02189 0.01306 0.00048)
      PathPoint FDS4_P5: capitate (0.02545 0.00479 0.0023)
      PathPoint FDS4_P6: capitate (0.0289 -0.0155 0.0073)
      PathPoint FDS4_P7: metacarpal4 (0.0144 -0.0252 -0.00101)
      PathPoint FDS4_P8: metacarpal4 (0.009 -0.062 -0.006)
      PathPoint FDS4_A1: Proximalphalanx4 (0.007 -0.09 -0.0061)
      PathPoint FDS4_P9: Proximalphalanx4 (0.005 -0.122 -0.004)
      PathPoint FDS4_A2: Medialphalanx4 (0.005 -0.138 -0.0039)
      PathPoint FDS4_A3: Medialphalanx4 (0.005 -0.157 -0.002)
      PathPoint FDS4_A4: Distalphalanx4 (0.0055 -0.165 -0.001)
      PathPoint FDS4_P10: Distalphalanx4 (0.00672 -0.17283 0.00102)
    Millard2012EquilibriumMuscle FDS5: max_isometric_force=12 optimal_fiber_length=0.0515 tendon_slack_length=0.343
        pennation_angle_at_optimal=0.08726646
      PathPoint FDS5_P1: humerus (0.0035 -0.2945 0.03226)
      PathPoint FDS5_P2: radius (0.01048 -0.21423 0.03978)
      PathPoint FDS5_P3: radius (0.001 -0.2177 0.0418)
      PathPoint FDS5_P4: capitate (0.02201 0.01258 -0.00027)
      PathPoint FDS5_P5: capitate (0.0268 -0.0129 0.0061)
      PathPoint FDS5_P6: capitate (0.0268 -0.0129 0.0061)
      PathPoint FDS5_P7: metacarpal5 (0.01463 -0.02498 -0.01151)
      PathPoint FDS5_P8: metacarpal5 (0.012 -0.057 -0.029)
      PathPoint FDS5_A1: Proximalphalanx5 (0.007 -0.078 -0.034)
      PathPoint FDS5_P9: Proximalphalanx5 (0.009 -0.098 -0.033)
      PathPoint FDS5_A2: Medialphalanx5 (0.011 -0.118 -0.031)
      PathPoint FDS5_A3: Medialphalanx5 (0.011 -0.129 -0.031)
      PathPoint FDS5_P10: Distalphalanx5 (0.00983 -0.13986 -0.03115)
    ElasticFoundationForce contact_ring_pp4: transition_velocity=0.2
      ContactParametersSet contact_parameters:
        ContactParameters: geometry=(contact_pp4 contact_Cylinder) stiffness=4000000 dissipation=2 static_friction=0.8
            dynamic_friction=0.4 viscous_friction=0.4
    ElasticFoundationForce contact_ring_dp4: transition_velocity=0.2
      ContactParametersSet contact_parameters:
        ContactParameters: geometry=(contact_dp4 contact_Cylinder) stiffness=4000000 dissipation=2 static_friction=0.8
            dynamic_friction=0.4 viscous_friction=0.4
    ElasticFoundationForce contact_ring_mc4: transition_velocity=0.2
      ContactParametersSet contact_parameters:
        ContactParameters: geometry=(contact_mc4 contact_Cylinder) stiffness=4000000 dissipation=2 static_friction=0.8
            dynamic_friction=0.4 viscous_friction=0.4
    ElasticFoundationForce contact_thumb: transition_velocity=0.2
      ContactParametersSet contact_parameters:
        ContactParameters: geometry=(contact_mc1 contact_pp1 contact_dp1 contact_Cylinder) stiffness=4000000
            dissipation=2 static_friction=0.8 dynamic_friction=0.4 viscous_friction=0.4
    ElasticFoundationForce contact_index: transition_velocity=0.2
      ContactParametersSet contact_parameters:
        ContactParameters: geometry=(contact_pp2 contact_mp2 contact_dp2 contact_mc2 contact_Cylinder)
            stiffness=4000000 dissipation=2 static_friction=0.8 dynamic_friction=0.4 viscous_friction=0.4
    ObjectGroup flexors
    ObjectGroup radial deviators
    ObjectGroup wrist
    ObjectGroup ulnar deviators
    ObjectGroup extensors
    ObjectGroup transfer
    ObjectGroup final
    ObjectGroup hand
    ObjectGroup thumb
  MarkerSet:
    Marker CMC1: metacarpal1 (-0.000769447 0.0043449 0.0233998) fixed=true
    Marker CMC2: metacarpal2 (-0.0171852 -0.0163273 0.0295545) fixed=true
    Marker CMC5: metacarpal5 (-0.0123096 -0.0206636 -0.0305483) fixed=true
    Marker MP1: metacarpal1 (0.00553266 -0.0310789 0.055322) fixed=true
    Marker MP2: metacarpal2 (-0.0105963 -0.0777904 0.0458314) fixed=true
    Marker MP3: metacarpal3 (-0.0123438 -0.0841903 0.0147253) fixed=true
    Marker MP4: metacarpal4 (-0.00821118 -0.0838102 -0.00917913) fixed=true
    Marker MP5: metacarpal5 (-0.007635 -0.072027 -0.0379326) fixed=true
    Marker IP: Proximalphalanx1 (0.0126819 -0.0608548 0.0694094) fixed=true
    Marker PP2: Proximalphalanx2 (-0.005175 -0.058126 0.00869704) fixed=true
    Marker PP3: Proximalphalanx3 (-0.00961824 -0.139196 0.0207504) fixed=true
    Marker PP4: Proximalphalanx4 (-0.00556189 -0.138111 -0.00373965) fixed=true
    Marker PP5: Proximalphalanx5 (-0.00515283 -0.111061 -0.0353297) fixed=true
    Marker DP2: Medialphalanx2 (-0.00298737 -0.0394561 0.00376869) fixed=true
    Marker DP3: Medialphalanx3 (-0.00892091 -0.172206 0.0234315) fixed=true
    Marker DP4: Medialphalanx4 (-0.00213524 -0.169702 -0.000918559) fixed=true
    Marker DP5: Medialphalanx5 (-0.00321466 -0.136132 -0.0302772) fixed=true
    Marker FT1: Distalphalanx1 (0.0106472 -0.0906538 0.0792393) fixed=true
    Marker FT2: Distalphalanx2 (-0.00495079 -0.0247732 0.00134107) fixed=true
    Marker FT3: Distalphalanx3 (-0.0101647 -0.187983 0.0272654) fixed=true
    Marker FT4: Distalphalanx4 (-0.00116731 -0.186122 0.000404973) fixed=true
    Marker FT5: Distalphalanx5 (-0.00124371 -0.154295 -0.028567) fixed=true
    Marker EM: ulna (-0.0119775 -0.0224608 -0.0194275) fixed=true
    Marker EL: radius (-0.0208062 -0.00139596 0.00347157) fixed=true
    Marker US: ulna (-0.0205133 -0.221015 0.0796279) fixed=true
    Marker RS: radius (0.000940134 -0.209164 0.082699) fixed=true
  ContactGeometrySet:
    ContactHalfSpace ground_contact: socket_frame=/ground location=(0 -1 0) orientation=(0 0 -1.570796)
    ContactMesh contact_Cylinder: socket_frame=/bodyset/Cylinder location=(-0.035 -0.1 -0.035) filename=cylinder.STL
    ContactMesh contact_pp2: socket_frame=/bodyset/Proximalphalanx2 location=(0 0 0)
        filename=../../Geometry/fingers2.vtp
    ContactMesh contact_mp2: socket_frame=/bodyset/Medialphalanx2 location=(0 0 0) filename=../../Geometry/fingers3.vtp
    ContactMesh contact_dp2: socket_frame=/bodyset/Distalphalanx2 location=(0 0 0) filename=../../Geometry/fingers4.vtp
    ContactMesh contact_mc2: socket_frame=/bodyset/metacarpal2 location=(0 0 0) filename=../../Geometry/fingers1.vtp
    ContactMesh contact_pp3: socket_frame=/bodyset/Proximalphalanx3 location=(0 0 0)
        filename=../../Geometry/fingers7.vtp
    ContactMesh contact_dp3: socket_frame=/bodyset/Distalphalanx3 location=(0 0 0) filename=../../Geometry/fingers5.vtp
    ContactMesh contact_pp4: socket_frame=/bodyset/Proximalphalanx4 location=(0 0 0)
        filename=../../Geometry/fingers11.vtp
    ContactMesh contact_dp4: socket_frame=/bodyset/Distalphalanx4 location=(0 0 0) filename=../../Geometry/fingers9.vtp
    ContactMesh contact_mc4: socket_frame=/bodyset/metacarpal4 location=(0 0 0) filename=../../Geometry/fingers12.vtp
    ContactMesh contact_mc1: socket_frame=/bodyset/metacarpal1 location=(0 0 0) filename=../../Geometry/fingers17.vtp
    ContactMesh contact_pp1: socket_frame=/bodyset/Proximalphalanx1 location=(0 0 0)
        filename=../../Geometry/fingers18.vtp
    ContactMesh contact_dp1: socket_frame=/bodyset/Distalphalanx1 location=(0 0 0)
        filename=../../Geometry/fingers19.vtp
