# OpenSim document version 40000
Model:
  gravity: 0 -9.81 0
  credits: Gonzalez, R.V., Buchanan, T.S., Delp, S.L.
  length_units: meters
  force_units: N
  publications:
    How muscle architecture and moment arms affect wrist flexion-extension moments. Journal of Biomechanics, vol. 30, pp. 705-712, 1997.
  Ground: meshes=humerus.vtp
  BodySet:
    Body ulna: mass=1.1 [kg] mass_center=(0 -0.04 -0.03) inertia=(8.5 50 8.5 0 0 0) meshes=ulna.vtp
    Body radius: mass=0.2 mass_center=(0 -0.04 -0.03) inertia=(8.5 50 8.5 0 0 0) meshes=radius.vtp
    Body rotaxis: mass=0.001 mass_center=(0 0 0) inertia=(0.05928 0.05928 0.05928 0 0 0)
    Body auxprfem: mass=0.001 mass_center=(0 0 0) inertia=(0.05928 0.05928 0.05928 0 0 0)
    Body auxprrud: mass=0.001 mass_center=(0 0 0) inertia=(0.05928 0.05928 0.05928 0 0 0)
    Body auxdrfem: mass=0.001 mass_center=(0 0 0) inertia=(0.05928 0.05928 0.05928 0 0 0)
    Body auxdrrud: mass=0.001 mass_center=(0 0 0) inertia=(0.05928 0.05928 0.05928 0 0 0)
    Body scaphoid: mass=0.005 mass_center=(0 0 0) inertia=(0.05928 0.05928 0.05928 0 0 0) meshes=r_scaph.vtp
    Body lunate: mass=0.004 mass_center=(0 0 0) inertia=(0.05928 0.05928 0.05928 0 0 0) meshes=r_lun.vtp
    Body trapezium: mass=0.004 mass_center=(0 0 0) inertia=(0.05928 0.05928 0.05928 0 0 0) meshes=r_trpzm.vtp
    Body trapezoid: mass=0.004 mass_center=(0 0 0) inertia=(0.05928 0.05928 0.05928 0 0 0) meshes=r_trpzd.vtp
    Body capitate: mass=0.006 mass_center=(0 0 0) inertia=(0.05928 0.05928 0.05928 0 0 0) meshes=r_cap.vtp
    Body pisiform: mass=0.002 mass_center=(0 0 0) inertia=(0.05928 0.05928 0.05928 0 0 0) meshes=r_pis.vtp
    Body triquetrum: mass=0.002 mass_center=(0 0 0) inertia=(0.05928 0.05928 0.05928 0 0 0) meshes=r_triq.vtp
    Body hamate: mass=0.06 mass_center=(0 0 0) inertia=(0.05928 0.05928 0.05928 0 0 0) meshes=r_ham.vtp
    Body carp_metacarp: mass=0.001 mass_center=(0 0 0) inertia=(0.05928 0.05928 0.05928 0 0 0)
    Body metacarpal2: mass=0.08 mass_center=(0 -0.029 0.03) inertia=(1.23126 3.67 1.23126 0 0 0) meshes=fingers1.vtp
    Body metacarpal3: mass=0.08 mass_center=(0 -0.04 0.012) inertia=(1.23126 3.67 1.23126 0 0 0) meshes=fingers8.vtp
    Body metacarpal4: mass=0.08 mass_center=(0 -0.04 -0.007) inertia=(1.23126 3.67 1.23126 0 0 0) meshes=fingers12.vtp
    Body metacarpal5: mass=0.08 mass_center=(0 -0.04 -0.03) inertia=(1.23126 3.67 1.23126 0 0 0) meshes=fingers16.vtp
    Body imagine: mass=0.001 mass_center=(0 0 0) inertia=(0.05928 0.05928 0.05928 0 0 0)
    Body humerus: mass=1.9 mass_center=(0 0 0) inertia=(8.5 50 8.5 0 0 0) meshes=humerus.vtp
    Body metacarpal1: mass=0.01855 mass_center=(0 -0.019 0.02) inertia=(1.23126 3.67 1.23126 0 0 0)
        meshes=fingers17.vtp
    Body Proximalphalanx1: mass=0.00875 mass_center=(0.005 -0.054 0.0475) inertia=(0.437 0.78372 0.437 0 0 0)
        meshes=fingers18.vtp
    Body Distalphalanx1: mass=0.01008 mass_center=(0.0125 -0.078 0.0587) inertia=(0.504 1.1166 0.504 0 0 0)
        meshes=fingers19.vtp
    Body Proximalphalanx2: mass=0.01331 mass_center=(0.00025 -0.02413 0.004) inertia=(0.63012 2.5389 0.63012 0 0 0)
        meshes=fingers2.vtp
    Body Medialphalanx2: mass=0.00674 mass_center=(0.001 -0.0164 0.0024) inertia=(0.2914 0.49156 0.2914 0 0 0)
        meshes=fingers3.vtp
    Body Distalphalanx2: mass=0.00584 mass_center=(0 -0.01 0) inertia=(0.20853 0.43472 0.20853 0 0 0)
        meshes=fingers4.vtp
    Body Proximalphalanx3: mass=0.01496 mass_center=(-0.005 -0.1063 0.0115) inertia=(0.64411 4.13694 0.64411 0 0 0)
        meshes=fingers7.vtp
    Body Medialphalanx3: mass=0.00641 mass_center=(-0.004 -0.152 0.0145) inertia=(0.22885 0.55121 0.22885 0 0 0)
        meshes=fingers6.vtp
    Body Distalphalanx3: mass=0.00584 mass_center=(-0.0024 -0.179 0.0183) inertia=(0.20853 0.43472 0.20853 0 0 0)
        meshes=fingers5.vtp
    Body Proximalphalanx4: mass=0.00991 mass_center=(0.0015 -0.104 -0.0105) inertia=(0.34895 1.82809 0.34895 0 0 0)
        meshes=fingers11.vtp
      WrapCylinder Wrap_MCP4: translation=(0.0015 -0.077 -0.0105) quadrant=all radius=0.008 length=0.014
    Body Medialphalanx4: mass=0.00577 mass_center=(0.0016 -0.147 -0.0059) inertia=(0.16742 0.56728 0.16742 0 0 0)
        meshes=fingers10.vtp
    Body Distalphalanx4: mass=0.00483 mass_center=(-0.0011 -0.1691 0.0004) inertia=(0.14 0.35276 0.14 0 0 0)
        meshes=fingers9.vtp
    Body Proximalphalanx5: mass=0.0065 mass_center=(0.0038 -0.086 -0.0374) inertia=(0.16822 0.9479 0.16822 0 0 0)
        meshes=fingers15.vtp
    Body Medialphalanx5: mass=0.00349 mass_center=(0.005 -0.121 -0.0345) inertia=(0.07802 0.21969 0.07802 0 0 0)
        meshes=fingers14.vtp
    Body Distalphalanx5: mass=0.00266 mass_center=(0.0035 -0.1405 -0.0338) inertia=(0.05928 0.1089 0.05928 0 0 0)
        meshes=fingers13.vtp
    Body Cylinder: mass=10 mass_center=(0 -0.1 0) inertia=(1 1 1 0 0 0)
      Cylinder Cylinder_geom_1: radius=0.03 half_height=0.1
  JointSet:
    CustomJoint radioulnar: socket_parent_frame=ulna_offset socket_child_frame=radius_offset
      Coordinate pro_sup: default_value=1.815142 range=(0 3.141593) clamped=true locked=true
      PhysicalOffsetFrame ulna_offset: socket_parent=/bodyset/ulna translation=(-0.0065 -0.008 0.027) [meters]
      PhysicalOffsetFrame radius_offset: socket_parent=/bodyset/radius translation=(0 0 0)
      SpatialTransform: axes_held_at_zero=(rotation1 rotation3 translation1 translation2 translation3)
        TransformAxis rotation2: coordinates=pro_sup axis=(0.05639802 0.9835774 -0.1714491)
            LinearFunction(coefficients=1 0)
    WeldJoint rad-rotaxis: socket_parent_frame=radius_offset socket_child_frame=rotaxis_offset
      PhysicalOffsetFrame radius_offset: socket_parent=/bodyset/radius translation=(-0.0085 -0.2313 0.0561)
          orientation=(-0.261799 0.392699 0) [radians]
      PhysicalOffsetFrame rotaxis_offset: socket_parent=/bodyset/rotaxis translation=(0 0 0)
    CustomJoint rotaxis-auxprfem: socket_parent_frame=rotaxis_offset socket_child_frame=auxprfem_offset
      Coordinate rotaxis_auxprfem_r3: default_value=0 range=(-99999.9 99999.9) clamped=false locked=true
      PhysicalOffsetFrame rotaxis_offset: socket_parent=/bodyset/rotaxis translation=(-0.001 0.009 0)
      PhysicalOffsetFrame auxprfem_offset: socket_parent=/bodyset/auxprfem translation=(0 0 0)
      SpatialTransform: axes_held_at_zero=(rotation1 rotation2 translation1 translation2 translation3)
        TransformAxis rotation3: coordinates=rotaxis_auxprfem_r3 axis=(0 0 1) LinearFunction(coefficients=1 0)
    CustomJoint auxprfem-auxprrud: socket_parent_frame=auxprfem_offset socket_child_frame=auxprrud_offset
      Coordinate auxprfem-auxprrud_coord: default_value=0 range=(-0.4363323 0.6108652) clamped=false locked=true
      PhysicalOffsetFrame auxprfem_offset: socket_parent=/bodyset/auxprfem translation=(0 0 0)
      PhysicalOffsetFrame auxprrud_offset: socket_parent=/bodyset/auxprrud translation=(0 0 0)
      SpatialTransform: axes_held_at_zero=(rotation2 rotation3 translation1 translation2 translation3)
        TransformAxis rotation1: coordinates=auxprfem-auxprrud_coord axis=(1 0 0) LinearFunction(coefficients=1 0)
    CustomJoint auxprrud-auxdrfem: socket_parent_frame=auxprrud_offset socket_child_frame=auxdrfem_offset
      Coordinate auxprrud_auxdrfem_r3: default_value=0 range=(-99999.9 99999.9) clamped=false locked=true
      PhysicalOffsetFrame auxprrud_offset: socket_parent=/bodyset/auxprrud translation=(0.001 -0.02 0)
      PhysicalOffsetFrame auxdrfem_offset: socket_parent=/bodyset/auxdrfem translation=(0 0 0)
      SpatialTransform: axes_held_at_zero=(rotation1 rotation2 translation1 translation2 translation3)
        TransformAxis rotation3: coordinates=auxprrud_auxdrfem_r3 axis=(0 0 1) LinearFunction(coefficients=1 0)
    CustomJoint auxdrfem-auxdrrud: socket_parent_frame=auxdrfem_offset socket_child_frame=auxdrrud_offset
      Coordinate auxdrfem_auxdrrud_r1: default_value=0 range=(-99999.9 99999.9) clamped=false locked=true
      PhysicalOffsetFrame auxdrfem_offset: socket_parent=/bodyset/auxdrfem translation=(0 0 0)
      PhysicalOffsetFrame auxdrrud_offset: socket_parent=/bodyset/auxdrrud translation=(0 0 0)
      SpatialTransform: axes_held_at_zero=(rotation2 rotation3 translation1 translation2 translation3)
        TransformAxis rotation1: coordinates=auxdrfem_auxdrrud_r1 axis=(1 0 0) LinearFunction(coefficients=1 0)
    WeldJoint prox-scaph: socket_parent_frame=auxprrud_offset socket_child_frame=scaphoid_offset
      PhysicalOffsetFrame auxprrud_offset: socket_parent=/bodyset/auxprrud translation=(-0.0035 -0.0025 0.009)
          orientation=(0.401426 0 0)
      PhysicalOffsetFrame scaphoid_offset: socket_parent=/bodyset/scaphoid translation=(0 0 0)
    WeldJoint prox-lun: socket_parent_frame=auxprrud_offset socket_child_frame=lunate_offset
      PhysicalOffsetFrame auxprrud_offset: socket_parent=/bodyset/auxprrud translation=(-0.004 -0.0015 -0.007)
      PhysicalOffsetFrame lunate_offset: socket_parent=/bodyset/lunate translation=(0 0 0)
    WeldJoint dist-trpzm: socket_parent_frame=auxdrrud_offset socket_child_frame=trapezium_offset
      PhysicalOffsetFrame auxdrrud_offset: socket_parent=/bodyset/auxdrrud translation=(0.0035 -0.0035 0.02)
          orientation=(-0.261799 0 0)
      PhysicalOffsetFrame trapezium_offset: socket_parent=/bodyset/trapezium translation=(0 0 0)
    WeldJoint dist-trpzd: socket_parent_frame=auxdrrud_offset socket_child_frame=trapezoid_offset
      PhysicalOffsetFrame auxdrrud_offset: socket_parent=/bodyset/auxdrrud translation=(-0.0015 -0.0044 0.0134)
          orientation=(0.349066 -0.174533 0)
      PhysicalOffsetFrame trapezoid_offset: socket_parent=/bodyset/trapezoid translation=(0 0 0)
    WeldJoint dist-cap: socket_parent_frame=auxdrrud_offset socket_child_frame=capitate_offset
      PhysicalOffsetFrame auxdrrud_offset: socket_parent=/bodyset/auxdrrud translation=(-0.0155 -0.0018 -0.0055)
          orientation=(0.174533 0 0)
      PhysicalOffsetFrame capitate_offset: socket_parent=/bodyset/capitate translation=(0 0 0)
    WeldJoint prox-pis: socket_parent_frame=auxprrud_offset socket_child_frame=pisiform_offset
      PhysicalOffsetFrame auxprrud_offset: socket_parent=/bodyset/auxprrud translation=(0.005 -0.015 -0.0201)
      PhysicalOffsetFrame pisiform_offset: socket_parent=/bodyset/pisiform translation=(0 0 0)
    WeldJoint prox-triq: socket_parent_frame=auxprrud_offset socket_child_frame=triquetrum_offset
      PhysicalOffsetFrame auxprrud_offset: socket_parent=/bodyset/auxprrud translation=(-0.0055 -0.01 -0.021)
      PhysicalOffsetFrame triquetrum_offset: socket_parent=/bodyset/triquetrum translation=(0 0 0)
    WeldJoint dist-ham: socket_parent_frame=auxdrrud_offset socket_child_frame=hamate_offset
      PhysicalOffsetFrame auxdrrud_offset: socket_parent=/bodyset/auxdrrud translation=(-0.006 -0.005 -0.0175)
          orientation=(-0.20944 0 0)
      PhysicalOffsetFrame hamate_offset: socket_parent=/bodyset/hamate translation=(0 0 0)
    WeldJoint auxCMC: socket_parent_frame=auxdrrud_offset socket_child_frame=carp_metacarp_offset
      PhysicalOffsetFrame auxdrrud_offset: socket_parent=/bodyset/auxdrrud translation=(0 0 0)
      PhysicalOffsetFrame carp_metacarp_offset: socket_parent=/bodyset/carp_metacarp translation=(0 0 0)
    WeldJoint CMC2: socket_parent_frame=carp_metacarp_offset socket_child_frame=metacarpal2_offset
      PhysicalOffsetFrame carp_metacarp_offset: socket_parent=/bodyset/carp_metacarp
          translation=(-0.0047 -0.0095 -0.005) orientation=(0.174533 0.261799 0)
      PhysicalOffsetFrame metacarpal2_offset: socket_parent=/bodyset/metacarpal2 translation=(0 0 0)
    WeldJoint CMC3: socket_parent_frame=carp_metacarp_offset socket_child_frame=metacarpal3_offset
      PhysicalOffsetFrame carp_metacarp_offset: socket_parent=/bodyset/carp_metacarp
          translation=(-0.0047 -0.0085 -0.005) orientation=(0.0872665 0.174533 0.0872665)
      PhysicalOffsetFrame metacarpal3_offset: socket_parent=/bodyset/metacarpal3 translation=(0 0 0)
    WeldJoint CMC4: socket_parent_frame=carp_metacarp_offset socket_child_frame=metacarpal4_offset
      PhysicalOffsetFrame carp_metacarp_offset: socket_parent=/bodyset/carp_metacarp
          translation=(-0.0047 -0.008 -0.0033) orientation=(0.0872665 0.174533 0.0872665)
      PhysicalOffsetFrame metacarpal4_offset: socket_parent=/bodyset/metacarpal4 translation=(0 0 0)
    WeldJoint CMC5: socket_parent_frame=carp_metacarp_offset socket_child_frame=metacarpal5_offset
      PhysicalOffsetFrame carp_metacarp_offset: socket_parent=/bodyset/carp_metacarp translation=(-0.002 -0.01 0.0035)
          orientation=(0.0872665 0.174533 0.0872665)
      PhysicalOffsetFrame metacarpal5_offset: socket_parent=/bodyset/metacarpal5 translation=(0 0 0)
    CustomJoint Wrist: socket_parent_frame=rotaxis_offset socket_child_frame=imagine_offset
      Coordinate deviation: default_value=0.1745329 range=(-0.436332 0.610865) clamped=true
      Coordinate flexion: default_value=0 range=(-1.22173 1.22173) clamped=false
      PhysicalOffsetFrame rotaxis_offset: socket_parent=/bodyset/rotaxis translation=(0 0 0)
      PhysicalOffsetFrame imagine_offset: socket_parent=/bodyset/imagine translation=(0 0 0)
      SpatialTransform: axes_held_at_zero=(rotation2 translation1 translation2 translation3)
        TransformAxis rotation1: coordinates=deviation axis=(1 0 0) LinearFunction(coefficients=1 0)
        TransformAxis rotation3: coordinates=flexion axis=(0 0 1) LinearFunction(coefficients=1 0)
    FreeJoint initpos: socket_parent_frame=ground_offset socket_child_frame=humerus_offset
      Coordinate init_x_rot: default_value=0.4537856 locked=true
      Coordinate init_y_rot: default_value=0 locked=true
      Coordinate init_z_rot: default_value=1.48353 locked=true
      Coordinate init_x_tran: default_value=0 locked=true
      Coordinate init_y_tran: default_value=0.05 locked=true
      Coordinate init_z_tran: default_value=0 locked=true
      PhysicalOffsetFrame ground_offset: socket_parent=/ground translation=(0 0 0)
      PhysicalOffsetFrame humerus_offset: socket_parent=/bodyset/humerus translation=(0 0 0)
    PinJoint elbow_new: socket_parent_frame=humerus_offset socket_child_frame=ulna_offset
      Coordinate elbow: default_value=0.5235988 range=(0 2.268928) clamped=true locked=true
      PhysicalOffsetFrame humerus_offset: socket_parent=/bodyset/humerus translation=(0.0127 -0.274 0.0389)
      PhysicalOffsetFrame ulna_offset: socket_parent=/bodyset/ulna translation=(0 0 0)
    UniversalJoint CMC1: socket_parent_frame=trapezium_offset socket_child_frame=metacarpal1_offset
      Coordinate thumb_flex: default_value=0.8726646 range=(-0.3490659 1.22173) clamped=true
      Coordinate thumb_abd: default_value=0.7679449 range=(-0.2617994 1.22173) clamped=true
      PhysicalOffsetFrame trapezium_offset: socket_parent=/bodyset/trapezium translation=(0 0 0)
          orientation=(0.7853982 0 0.3490659)
      PhysicalOffsetFrame metacarpal1_offset: socket_parent=/bodyset/metacarpal1 translation=(0 0 0)
          orientation=(0.7853982 0 0.3490659)
    UniversalJoint MCP1: socket_parent_frame=metacarpal1_offset socket_child_frame=Proximalphalanx1_offset
      Coordinate MCP1_flex: default_value=0 range=(-0.4363323 1.047198) clamped=true
      Coordinate MCP1_abd: default_value=0 range=(-0.2617994 0.2617994) clamped=true
      PhysicalOffsetFrame metacarpal1_offset: socket_parent=/bodyset/metacarpal1 translation=(0 -0.038 0.04)
          orientation=(-2.356194 0 -0.5235988)
      PhysicalOffsetFrame Proximalphalanx1_offset: socket_parent=/bodyset/Proximalphalanx1 translation=(0 -0.038 0.04)
          orientation=(-2.356194 0 -0.5235988)
    PinJoint IP: socket_parent_frame=Proximalphalanx1_offset socket_child_frame=Distalphalanx1_offset
      Coordinate IP: default_value=0.418879 range=(-0.4363323 0.8726646) clamped=true
      PhysicalOffsetFrame Proximalphalanx1_offset: socket_parent=/bodyset/Proximalphalanx1
          translation=(0.01 -0.07 0.055) orientation=(0 1.322776 0)
      PhysicalOffsetFrame Distalphalanx1_offset: socket_parent=/bodyset/Distalphalanx1 translation=(0.01 -0.07 0.055)
          orientation=(0 1.322776 0)
    UniversalJoint MCP2: socket_parent_frame=metacarpal2_offset socket_child_frame=Proximalphalanx2_offset
      Coordinate MCP2_abd: default_value=-0.1745329 range=(-0.3490659 0.3490659) clamped=true
      Coordinate MCP2_flex: default_value=0 range=(-0.08726646 1.745329) clamped=true
      PhysicalOffsetFrame metacarpal2_offset: socket_parent=/bodyset/metacarpal2 translation=(-0.0024 -0.0685 0.045)
          orientation=(1.413717 0 0)
      PhysicalOffsetFrame Proximalphalanx2_offset: socket_parent=/bodyset/Proximalphalanx2 translation=(0 0 0)
          orientation=(1.413717 0 0)
    PinJoint PIP2: socket_parent_frame=Proximalphalanx2_offset socket_child_frame=Medialphalanx2_offset
      Coordinate PIP2: default_value=0 range=(-0.08726646 1.745329) clamped=true
      PhysicalOffsetFrame Proximalphalanx2_offset: socket_parent=/bodyset/Proximalphalanx2
          translation=(0.0005 -0.04826 0.008) orientation=(-0.1570796 0 0)
      PhysicalOffsetFrame Medialphalanx2_offset: socket_parent=/bodyset/Medialphalanx2 translation=(0 0 0)
          orientation=(-0.1570796 0 0)
    PinJoint DIP2: socket_parent_frame=Medialphalanx2_offset socket_child_frame=Distalphalanx2_offset
      Coordinate DIP2: default_value=0 range=(-0.08726646 1.745329) clamped=true
      PhysicalOffsetFrame Medialphalanx2_offset: socket_parent=/bodyset/Medialphalanx2
          translation=(0.00193 -0.03277 0.00472) orientation=(-0.1570796 0 0)
      PhysicalOffsetFrame Distalphalanx2_offset: socket_parent=/bodyset/Distalphalanx2 translation=(0 0 0)
          orientation=(-0.1570796 0 0)
    UniversalJoint MCP3: socket_parent_frame=metacarpal3_offset socket_child_frame=Proximalphalanx3_offset
      Coordinate MCP3_abd: default_value=0 range=(-0.3490659 0.3490659) clamped=true locked=true
      Coordinate MCP3_flex: default_value=0 range=(-0.08726646 1.570796) clamped=true
      PhysicalOffsetFrame metacarpal3_offset: socket_parent=/bodyset/metacarpal3 translation=(-0.005 -0.0785 0.0109)
          orientation=(1.413717 0 0)
      PhysicalOffsetFrame Proximalphalanx3_offset: socket_parent=/bodyset/Proximalphalanx3
          translation=(-0.005 -0.0785 0.0109) orientation=(1.413717 0 0)
    PinJoint PIP3: socket_parent_frame=Proximalphalanx3_offset socket_child_frame=Medialphalanx3_offset
      Coordinate PIP3: default_value=0 range=(-0.08726646 1.745329) clamped=true
      PhysicalOffsetFrame Proximalphalanx3_offset: socket_parent=/bodyset/Proximalphalanx3
          translation=(-0.005 -0.132 0.02) orientation=(-0.1570796 0 0)
      PhysicalOffsetFrame Medialphalanx3_offset: socket_parent=/bodyset/Medialphalanx3 translation=(-0.005 -0.132 0.02)
          orientation=(-0.1570796 0 0)
    PinJoint DIP3: socket_parent_frame=Medialphalanx3_offset socket_child_frame=Distalphalanx3_offset
      Coordinate DIP3: default_value=0 range=(-0.08726646 1.745329) clamped=true
      PhysicalOffsetFrame Medialphalanx3_offset: socket_parent=/bodyset/Medialphalanx3
          translation=(-0.00294 -0.168 0.023) orientation=(-0.1570796 0 0)
      PhysicalOffsetFrame Distalphalanx3_offset: socket_parent=/bodyset/Distalphalanx3
          translation=(-0.00294 -0.165 0.023) orientation=(-0.1570796 0 0)
    UniversalJoint MCP4: socket_parent_frame=metacarpal4_offset socket_child_frame=Proximalphalanx4_offset
      Coordinate MCP4_abd: default_value=0.08726646 range=(-0.3490659 0.3490659) clamped=true locked=true
      Coordinate MCP4_flex: default_value=0 range=(-0.08726646 1.745329) clamped=true
      PhysicalOffsetFrame metacarpal4_offset: socket_parent=/bodyset/metacarpal4 translation=(0 -0.077 -0.0109)
          orientation=(1.570796 0 0)
      PhysicalOffsetFrame Proximalphalanx4_offset: socket_parent=/bodyset/Proximalphalanx4
          translation=(0 -0.077 -0.0109) orientation=(1.570796 0 0)
    PinJoint PIP4: socket_parent_frame=Proximalphalanx4_offset socket_child_frame=Medialphalanx4_offset
      Coordinate PIP4: default_value=0 range=(-0.08726646 1.745329) clamped=true
      PhysicalOffsetFrame Proximalphalanx4_offset: socket_parent=/bodyset/Proximalphalanx4
          translation=(-0.001 -0.129 -0.005)
      PhysicalOffsetFrame Medialphalanx4_offset: socket_parent=/bodyset/Medialphalanx4
          translation=(-0.001 -0.129 -0.005)
    PinJoint DIP4: socket_parent_frame=Medialphalanx4_offset socket_child_frame=Distalphalanx4_offset
      Coordinate DIP4: default_value=0 range=(-0.08726646 1.745329) clamped=true
      PhysicalOffsetFrame Medialphalanx4_offset: socket_parent=/bodyset/Medialphalanx4
          translation=(0.0003 -0.16 -0.0017)
      PhysicalOffsetFrame Distalphalanx4_offset: socket_parent=/bodyset/Distalphalanx4
          translation=(0.0003 -0.16 -0.0017)
    UniversalJoint MCP5: socket_parent_frame=metacarpal5_offset socket_child_frame=Proximalphalanx5_offset
      Coordinate MCP5_abd: default_value=0.4363323 range=(-0.3490659 0.5235988) clamped=true locked=true
      Coordinate MCP5_flex: default_value=0 range=(-0.08726646 1.570796) clamped=true
      PhysicalOffsetFrame metacarpal5_offset: socket_parent=/bodyset/metacarpal5 translation=(0.0015 -0.064 -0.0397)
          orientation=(1.570796 0 0)
      PhysicalOffsetFrame Proximalphalanx5_offset: socket_parent=/bodyset/Proximalphalanx5
          translation=(0.0015 -0.064 -0.0397) orientation=(1.570796 0 0)
    PinJoint PIP5: socket_parent_frame=Proximalphalanx5_offset socket_child_frame=Medialphalanx5_offset
      Coordinate PIP5: default_value=0 range=(-0.08726646 1.745329) clamped=true
      PhysicalOffsetFrame Proximalphalanx5_offset: socket_parent=/bodyset/Proximalphalanx5
          translation=(0.005 -0.108 -0.035)
      PhysicalOffsetFrame Medialphalanx5_offset: socket_parent=/bodyset/Medialphalanx5
          translation=(0.005 -0.108 -0.035)
    PinJoint DIP5: socket_parent_frame=Medialphalanx5_offset socket_child_frame=Distalphalanx5_offset
      Coordinate DIP5: default_value=0 range=(-0.08726646 1.570796) clamped=true
      PhysicalOffsetFrame Medialphalanx5_offset: socket_parent=/bodyset/Medialphalanx5
          translation=(0.004 -0.134 -0.034)
      PhysicalOffsetFrame Distalphalanx5_offset: socket_parent=/bodyset/Distalphalanx5
          translation=(0.006 -0.134 -0.034)
    FreeJoint Cylindertoground: socket_parent_frame=ground_offset socket_child_frame=Cylinder_offset
      Coordinate Cylinder_x_rot: default_value=0
      Coordinate Cylinder_y_rot: default_value=0
      Coordinate Cylinder_z_rot: default_value=0
      Coordinate Cylinder_x_tran: default_value=0.59
      Coordinate Cylinder_y_tran: default_value=0.1
      Coordinate Cylinder_z_tran: default_value=0.1
      PhysicalOffsetFrame ground_offset: socket_parent=/ground translation=(0 0 0)
      PhysicalOffsetFrame Cylinder_offset: socket_parent=/bodyset/Cylinder translation=(0 0 0)
  ControllerSet:
    PrescribedController MCP1_flex: actuator_list=act_MCP1_flex
      FunctionSet ControlFunctions:
        StepFunction: transition_start_time=3 transition_end_time=8 start_value=0 end_value=0.07
    PrescribedController IP: actuator_list=act_IP
      FunctionSet ControlFunctions:
        StepFunction: transition_start_time=3 transition_end_time=8 start_value=0 end_value=0.02
    PrescribedController MCP2_flex: actuator_list=act_MCP2_flex
      FunctionSet ControlFunctions:
        StepFunction: transition_start_time=1 transition_end_time=2 start_value=0 end_value=0.1
    PrescribedController PIP2: actuator_list=act_PIP2
      FunctionSet ControlFunctions:
        StepFunction: transition_start_time=1 transition_end_time=2 start_value=0 end_value=0.07
    PrescribedController DIP2: actuator_list=act_DIP2
      FunctionSet ControlFunctions:
        StepFunction: transition_start_time=1 transition_end_time=2 start_value=0.013 end_value=0.018
  ConstraintSet:
    CoordinateCouplerConstraint rotaxis_auxprfem_r3_con: independent_coordinate_names=flexion
        dependent_coordinate_name=rotaxis_auxprfem_r3 scale_factor=1
      coupled_coordinates_function: SimmSpline: x=(-1.5708 1.5708) y=(-0.785398 0.785398)
    CoordinateCouplerConstraint auxprrud_auxdrfem_r3_con: independent_coordinate_names=flexion
        dependent_coordinate_name=auxprrud_auxdrfem_r3 scale_factor=1
      coupled_coordinates_function: SimmSpline: x=(-1.22173 1.22173) y=(-0.610865 0.610865)
    CoordinateCouplerConstraint auxprfem-auxprrud_coord_con: independent_coordinate_names=deviation
        dependent_coordinate_name=auxprfem-auxprrud_coord scale_factor=1
      coupled_coordinates_function: SimmSpline: x=(-0.436332 0 0.610865) y=(-0.218166 0 0.305432)
    CoordinateCouplerConstraint auxdrfem_auxdrrud_r1_con: independent_coordinate_names=deviation
        dependent_coordinate_name=auxdrfem_auxdrrud_r1 scale_factor=1
      coupled_coordinates_function: SimmSpline: x=(-0.436332 0 0.610865) y=(-0.218166 0 0.305432)
  ForceSet:
    ElasticFoundationForce contactforce_finger: transition_velocity=0.2
      ContactParametersSet contact_parameters:
        ContactParameters: geometry=(contact_metacarpal1 contact_ProximalPhalanx1 contact_DistalPhalanx1 contact_Proximalphalanx2 contact_Medialphalanx2 contact_Distalphalanx2 contact_Proximalphalanx3 contact_Distalphalanx3 contact_Proximalphalanx4 contact_Distalphalanx4 contact_Proximalphalanx5 contact_metacarpal2 contact_metacarpal3 contact_metacarpal4 contact_metacarpal5 contact_Cylinder)
            stiffness=20000000 dissipation=2 static_friction=0.8 dynamic_friction=0.5 viscous_friction=0.6
    ElasticFoundationForce contactforce_cylinder: transition_velocity=0.2
      ContactParametersSet contact_parameters:
        ContactParameters: geometry=(ground_contact contact_Cylinder) stiffness=200000000 dissipation=2
            static_friction=1 dynamic_friction=0.5 viscous_friction=0.6
    CoordinateActuator act_thumb_flex: coordinate=thumb_flex
    CoordinateActuator act_thumb_abd: coordinate=thumb_abd
    CoordinateActuator act_MCP1_flex: coordinate=MCP1_flex
    CoordinateActuator act_MCP1_abd: coordinate=MCP1_abd
    CoordinateActuator act_IP: coordinate=IP
    CoordinateActuator act_MCP2_flex: coordinate=MCP2_flex
    CoordinateActuator act_MCP2_abd: coordinate=MCP2_abd
    CoordinateActuator act_PIP2: coordinate=PIP2
    CoordinateActuator act_DIP2: coordinate=DIP2
    CoordinateActuator act_MCP3_flex: coordinate=MCP3_flex
    CoordinateActuator act_MCP4_flex: coordinate=MCP4_flex
    CoordinateActuator act_MCP5_flex: coordinate=MCP5_flex
    ObjectGroup flexors
    ObjectGroup radial deviators
    ObjectGroup wrist
    ObjectGroup ulnar deviators
    ObjectGroup extensors
    ObjectGroup transfer
    ObjectGroup final
    ObjectGroup hand
    ObjectGroup thumb
  ContactGeometrySet:
    ContactHalfSpace ground_contact: socket_frame=/ground location=(0 0 0) orientation=(0 0 -1.570796)
    ContactMesh contact_metacarpal1: socket_frame=/bodyset/metacarpal1 location=(0 0 0)
        filename=../../Geometry/fingers17.vtp
    ContactMesh contact_ProximalPhalanx1: socket_frame=/bodyset/Proximalphalanx1 location=(0 0 0)
        filename=../../Geometry/fingers18.vtp
    ContactMesh contact_DistalPhalanx1: socket_frame=/bodyset/Distalphalanx1 location=(0 0 0)
        filename=../../Geometry/fingers19.vtp
    ContactMesh contact_Proximalphalanx2: socket_frame=/bodyset/Proximalphalanx2 location=(0 0 0)
        filename=../../Geometry/fingers2.vtp
    ContactMesh contact_Medialphalanx2: socket_frame=/bodyset/Medialphalanx2 location=(0 0 0)
        filename=../../Geometry/fingers3.vtp
    ContactMesh contact_Distalphalanx2: socket_frame=/bodyset/Distalphalanx2 location=(0 0 0)
        filename=../../Geometry/fingers4.vtp
    ContactMesh contact_Proximalphalanx3: socket_frame=/bodyset/Proximalphalanx3 location=(0 0 0)
        filename=../../Geometry/fingers7.vtp
    ContactMesh contact_Distalphalanx3: socket_frame=/bodyset/Distalphalanx3 location=(0 0 0)
        filename=../../Geometry/fingers5.vtp
    ContactMesh contact_Proximalphalanx4: socket_frame=/bodyset/Proximalphalanx4 location=(0 0 0)
        filename=../../Geometry/fingers11.vtp
    ContactMesh contact_Distalphalanx4: socket_frame=/bodyset/Distalphalanx4 location=(0 0 0)
        filename=../../Geometry/fingers9.vtp
    ContactMesh contact_Proximalphalanx5: socket_frame=/bodyset/Proximalphalanx5 location=(0 0 0)
        filename=../../Geometry/fingers15.vtp
    ContactMesh contact_metacarpal2: socket_frame=/bodyset/metacarpal2 location=(0 0 0)
        filename=../../Geometry/fingers1.vtp
    ContactMesh contact_metacarpal3: socket_frame=/bodyset/metacarpal3 location=(0 0 0)
        filename=../../Geometry/fingers8.vtp
    ContactMesh contact_metacarpal4: socket_frame=/bodyset/metacarpal4 location=(0 0 0)
        filename=../../Geometry/fingers12.vtp
    ContactMesh contact_metacarpal5: socket_frame=/bodyset/metacarpal5 location=(0 0 0)
        filename=../../Geometry/fingers16.vtp
    ContactMesh contact_Cylinder: socket_frame=/bodyset/Cylinder location=(-0.033 -0.1 -0.033) filename=cylinder.STL
